solve block
    # constraints
    x''(t) == -x(t)*10 - x'(t)*2
    x(0) == 0
    x'(0) == 10
    # solver
    x := odesolve(x(t), 10, 100000)
end solve block
solve block
    # constraints
    y''(t) == -y(t)*10 - y'(t)*2 - 9.8
    y(0) == 0
    y'(0) == 0
    # solver
    y := odesolve(y(t), 10, 100000)
end solve block
# [plot: y(t) vs x(t)]
# [plot: x''(t), x'(t), x(t) vs t]
# [plot: y''(t), y'(t), y(t) vs t]
# Здесь мы не учитываем, что часть силы, развиваемой пружиной делится между проекциями
#
# То есть, из-за того, что тело падает вниз, пружина растягивается по диагонали, следовательно, развиваемая ею сила делится на проекцию на x и y, поэтому в действительности сила по x будет меньше.
#
# Уравнения сейчас составлены независимо и для x это уменьшение силы не учитывается.
#
# Но представление о траектории тем не менее дается довольно точное.
