# Допустим, что сила является функцией времени, тогда на интервале dt она в общем случае будет меняться, следовательно, истинное приращение скорости будет равно интегралу от ускорения на интервале dt.
#
# При симуляции же мы полагаем такую силу постоянной на интервале dt. Следовательно, мы получаем ошибку при оценке приращения скорости. Причем, при стремлении dt к нулю, ошибка эта также стремится к нулю, а значит, приближенное приращение стремится к истинному.
#
# Далее, истинное приращение расстояния - это интеграл от скорости на интервале dt. Мы для простоты берем за основу скорость в начале интервала и считаем, что она постоянная. При таком подходе мы получаем ошибку при оценке приращения, но при стремлении dt к нулю, эта ошибка также стремится к нулю, а приближенное приращение стремится к истинному.
#
# Таким образом, полагая любую переменную силу постоянной на dt, мы можем задавать точность приближения как скорости так и приращения меняя величину dt. Чем меньше будет dt, тем ближе будут приближенные значения скорости и приращения к истинным.
solve block
    # constraints
    x''(t) == -x'(t)*5
    x(0) == 0
    x'(0) == 10
    # solver
    x := odesolve(x(t), 1, 100000)
end solve block
# [plot: x''(t), x'(t), x(t) vs t]
v_tangent1(t) := -50*t + 10
dt2 := 0.1
s_tangent1(t) := 10*t
v_tangent2(t) := x''(dt2/2)*t + 10
# [plot: s_tangent1(t), v_tangent2(dt2/2)*t, v_tangent1(dt2/2)*t, x(t) vs t]
# [plot: v_tangent1(t), v_tangent2(t), x'(t) vs t]
# [plot: x''(t) vs t]
s := x(dt2) = 0.786938
v := x'(dt2) = 6.0653
integral(x''(t), t = 0 .. dt2) = -3.9347
s' := 10*dt2 = 1
v' := 10 + (-50*dt2) = 5
s_err := s' - s = 0.213062
v_err := v - v' = 1.0653
v_tangent1(dt2/2)*dt2 = 0.75
integral(x'(t), t = 0 .. dt2) = 0.786938
v_tangent2(dt2/2)*dt2 = 0.8053
integral(v_tangent2(t), t = 0 .. dt2) = 0.8053
integral(v_tangent1(t), t = 0 .. dt2) = 0.75
