solve block
    # constraints
    x''(t) == -x(t)*5 - x'(t)*2
    x(0) == 5
    x'(0) == 0
    # solver
    x := odesolve(x(t), 10, 100000)
end solve block
solve block
    # constraints
    u''(t) == -u(t)*5
    u(0) == 5
    u'(0) == 0
    # solver
    u := odesolve(u(t), 10, 100000)
end solve block
d^2/dt^2(cos(t)) → -cos(t)
# [plot: x''(t), x'(t), x(t) vs t]
# [plot: u''(t), u'(t), u(t) vs t]
# [plot: x(t) vs t]
# [plot: u(t) vs t]
