m_a := 2
m_b := 1
e := 0.5  # Коэффициент восстановления
V_a := [1; 0]
V_b := [2; 3]
# Позиции масс в момент удара
P_a := [3.845; 0]
P_b := [4.59; -0.665]
# Переходим в СК удара, где ось X образована нормалью удара. Поскольку вдоль касательной ударных сил нет, далее рассматриваем все величины в проекции на нормаль удара как скаляры со знаками.
n := (P_a - P_b)/|P_a - P_b| = [-0.746026; 0.665916]  # Вектор нормали удара из B в A
nAxis := -n = [0.746026; -0.665916]  # Ось X в СК удара, обратна вектору нормали удара. Мы вводим её для того, чтобы скорость сближения A с B была положительной.
V_an := V_a*nAxis = 0.746026  # Проекция скорости A на нормаль удара
V_bn := V_b*nAxis = -0.505696  # Проекция скорости B на нормаль удара
V_clos := V_an - V_bn = 1.25172  # Скорость сближения A с B - относительная скорость.
V_sep := -V_clos*e = -0.625861  # Скорость разбегания после удара - относительная скорость.
# Удар в замкнутой системе не меняет вектор количества движения системы, а значит количество движения вдоль нормали тоже не меняется.
#
# Из этого следует, что дельты количества движения масс равны по модулю и противоположны по направлению.
#
# Дельты количества движения масс - это импульсы ударных сил, действующих на эти массы, следовательно модули импульсов ударных сил также равны между собой и противоположны по направлению.
#
# Стоит отметить, что даже если рассматриваемая система открыта для внешних неударных сил, то поскольку время удара бесконечно мало, мало и изменение количества движения, вызванное импульсами конечных сил и мало изменение позиции (интегралы от конечной силы и от скорости на бесконечно малом интервале близки к нулю). Поэтому, даже если есть внешние конечные силы, мы можем считать систему закрытой и пренебречь изменением кол-ва движения за счет этих сил. Важно только, чтобы на систему не действовали внешние ударные силы.
# Закон сохранения количества движения.
m_a*V_a + m_b*V_b == m_a*V_a' + m_b*V_b'  # ⇒
m_a*V_an + m_b*V_bn == m_a*V_an' + m_b*V_bn'  # ⇒
m_a*V_an - m_a*V_an' == m_b*V_bn' - m_b*V_bn  # ⇒
m_a*(V_an - V_an') == m_b*(V_bn' - V_bn)  # ⇒
-m_a*(-V_an + V_an') == m_b*(V_bn' - V_bn)  # ⇒
-m_a*(V_an' - V_an) == m_b*(V_bn' - V_bn)  # ⇒
-m_a*ΔV_an == m_b*ΔV_bn  # ⇒
-I_an == I_bn
# Физический эксперимент (в условиях близких к идеальным) говорит нам, что имеет место гипотеза Ньютона и закон сохранения количества движения. Следовательно, чтобы симуляция была физичной, мы должны вычислить новые скорости так, чтобы эти два условия были выполнены.
#
# Из гипотезы Ньютона следует, что дельта скорости второй массы однозначно определяется дельтой скорости первой массы. А из этого следствия и закона сохранения количества движения в свою очередь следует, что импульс ударной силы первой массы однозначно определяется известными на момент удара величинами: массы, абсолютные скорости.
#
# Из закона сохранения количества движения также следует, что ударные импульсы равны по модулю, следовательно, импульс первой силы однозначно определяет импульс второй силы, а значит, оба условия однозначно определяют дельты скоростей.
I_a := ((-m_b*V_an*e + m_b*V_bn*e + m_b*V_bn + m_a*V_an)/(m_a + m_b) - V_an)*m_a = -1.25172  # ⇒
# Столкновение с неподвижным объектом с бесконечно большой массой.
#
# В этом случае справедлива только гипотеза Ньютона.
# При этом относительная нормальная скорость - это нормальная проекция полной скорости точки.
# Упрощаем
⇒
-(V_an - V_bn)*(e + 1)*(m_a*m_b/(m_a + m_b)) = -1.25172  # ⇒
# Выражаем через обратные массы
V_an' == -V_an*e  # ⇒
V_an' - V_an == -V_an*e - V_an  # ⇒
ΔV_an == -V_an*(e + 1)  # ⇒
⇒
m_a_inv := 1/m_a
m_b_inv := 1/m_b
-(V_an - V_bn)*(e + 1)*(1/(m_a_inv + m_b_inv)) = -1.25172  # ⇒
ΔV_an*m_a == -V_an*(e + 1)*m_a  # ⇒
I_an == -V_an*(e + 1)*m_a  # ⇒
I_an == -V_an*(e + 1)*1/m_a_inv  # ⇒
I_an == -V_an*(e + 1)/m_a_inv
⇒
-(V_an - V_bn)*(e + 1)/(m_a_inv + m_b_inv) = -1.25172
I_a := |I_a|*n = [-0.933818; 0.833542]
I_b := -I_a = [0.933818; -0.833542]
ΔV_a := I_a/m_a = [-0.466909; 0.416771]
ΔV_b := I_b/m_b = [0.933818; -0.833542]
# По факту, мы дельту относительной скорости делим между массами в отношении обратном отношению масс.
V_a' := V_a + ΔV_a = [0.533091; 0.416771]
V_b' := V_b + ΔV_b = [2.93382; 2.16646]  # ⇒
|ΔV_a|/|ΔV_b| = 0.5
m_b/m_a = 0.5
# Проверяем, что закон сохранения количества движения не нарушен.
m_a*V_a' + m_b*V_b' = [4; 3]  # Количество движения системы после удара
m_a*V_a + m_b*V_b = [4; 3]  # Количество движения системы до удара
# Проверяем также, что гипотеза Ньютона о соотношении относительной скорости до и после удара также верна.
V_clos' := (V_a' - V_b')*nAxis = -0.625861  # Относительная нормальная скорость после удара
V_clos := (V_a - V_b)*nAxis = 1.25172  # Относительная нормальная скорость до удара
|V_clos'|/|V_clos| = 0.5
e = 0.5
