m_a := 2
m_b := 1
P_a := [4; 6]
P_b := [8; 6]
R_a := 3
R_b := 2
dist := |P_a - P_b| = 4
pen := (R_a + R_b) - dist = 1
in_collision := pen ≥ 0 = 1
# При устранении взаимного проникновения мы можем применить несколько стратегий:
#
# 1. Сдвинуть на полную величину проникновения только один объект.
# 2. Разделить полную величину проникновения поровну между двумя объектами.
# 3. Разделить полную величину проникновения между двумя объектами в таком отношении, чтобы величина сдвига первого объекта была во столько раз больше/меньше величины сдвига второго объекта, во сколько раз величина массы первого объекта меньше/больше массы второго объекта.
#
# Здесь мы реализуем третью стратегию. Мотивация в том, что хотя изменение количества движения обеих масс равно по модулю, более массивный объект тем не менее после удара изменит свою скорость на меньшую величину. А если рассмотреть предельный случай, когда масса бесконечно велика, то изменение скорости будет бесконечно мало, причем, скорость при этом изначально может быть равна нулю и сдвиг этого объекта, для устранения проникновения, будет выглядеть неадекватно.
#
# Таким образом, если, например, масса первого объекта в два раза больше массы второго объекта, то величина сдвига первого объекта должна быть в два раза меньше величины сдвига второго объекта.
#
# Более формально и коротко - отношение величин сдвига должно быть равно обратному отношению величин масс. При этом суммарная величина сдвига, понятное дело, должна быть равна полной величине проникновения.
# Символьное решение (штрих добавлен, чтобы не было коллизий с числовыми переменными).
# Детальное решение
# Выражение через обратные массы
(1)
d_a + d_b == pen' solve, d_b → pen' - d_a
[d_a/d_b == m_b'/m_a'; d_a + d_b == pen'] solve, d_a, d_b, fully → [m_b'*pen'/(m_b' + m_a'), m_a'*pen'/(m_b' + m_a')]
d_a/(pen' - d_a) == m_b'/m_a' solve, d_a → m_b'*pen'/(m_b' + m_a')
d_a/(pen' - d_a) == 1/m_b_inv'/(1/m_a_inv') solve, d_a → m_a_inv'*pen'/(m_b_inv' + m_a_inv')
(2)
d_a + d_b == pen' solve, d_a → pen' - d_b
(pen' - d_b)/d_b == m_b'/m_a' solve, d_b → m_a'*pen'/(m_b' + m_a')
(pen' - d_b)/d_b == 1/m_b_inv'/(1/m_a_inv') solve, d_b → m_b_inv'*pen'/(m_b_inv' + m_a_inv')
# Численное решение
[d_a/d_b == m_b/m_a; d_a + d_b == pen] solve, d_a, d_b, float, 2 → [0.33, 0.67]
# Смещение
P_a' := P_a + [-0.33; 0] = [3.67; 6]
P_b' := P_b + [0.67; 0] = [8.67; 6]
# Проверка, что проникновения больше нет
dist := |P_a' - P_b'| = 5
pen := (R_a + R_b) - dist = 0
