a := 2
f(x) := sqrt((a - x)^2 + x^2) - (a - x)
A := 1
ϕ := 3*π/2
δ := 0.5
ω := 5
g(x) := A*e^(δ*x)*cos(ω*x + ϕ)
h(x) := A*e^(δ*x)
n(x) := abs(g(x))/h(x)
c(x) := h(x)/abs(g(x))
t(x) := g(x)/h(x)
p(x) := e^x
o(x) := p(x)/abs(g(x))
limit(h(x)/g(x), x → -∞) → limit(1.0/cos(5.0*x + 4.71238898038), x → -∞)
# [plot: g(x), h(x), abs(g(x)), t(x), n(x), p(x) vs x]
limit(p(x)/g(x), x → -∞) → 0.0
# [plot: p(x)/abs(g(x)) vs x]
u(x) := limit(n(x), x → -∞) → limit(|cos(5.0*x + 4.71238898038)*2.71828182846^(0.5*x)|/2.71828182846^(0.5*x), x → -∞)
i(x) := |cos(5.0*x + 4.71238898038)*2.71828182846^(0.5*x)|/2.71828182846^(0.5*x)
# [plot: t(x), i(x) vs x]
g(0) = -1.83691e-16
alpha(x) := x
beta(x) := x*sin(1/x)
limit(beta(x)/alpha(x), x → 0) → limit(sin(1/x), x → 0)
# [plot: alpha(x), beta(x), sin(1/x) vs x]
