AB := [0; -14]
BB' := [2.465; -1.5]
u := AB/|AB| = [0; -1]
BB'_u := BB'*u = 1.5
t := (BB' - (BB'_u*u))/|BB' - (BB'_u*u)| = [1; 0]
BB'_t := BB'*t = 2.465
α := acos(BB'_t/|BB'|) = 0.54666
β := acos(BB'_u/|BB'|) = 1.02414
α + β = 1.5708
α + β == π/2 = 1
Δ_n := BB'_u = 1.5
BB'_t^2/(BB'_u*(sqrt((|AB| + BB'_u)^2 + BB'_t^2) + (|AB| + BB'_u))) = 0.129856
Δ_t := sqrt((|AB| + BB'_u)^2 + BB'_t^2) - (|AB| + BB'_u) = 0.194783
Δ_t/Δ_n = 0.129856
dn(x) := vectorize(x)*u
|BB'|*cos(α)^2/(cos(β)*(sqrt((|AB| + BB'_u)^2 + BB'_t^2) + (|AB| + BB'_u))) = 0.129856
k(x) := sin(x)*tan(x)
# [plot: k(x) vs x]
dt(x) := sqrt((|AB| + vectorize(x)*u)^2 + (vectorize(x)*t)^2) - (|AB| + vectorize(x)*u)
# Функция sin(β)*tan(β) не является ограниченной, поэтому несмотря на то, что левый множитель стремится к нулю, для этой функции можно подобрать такое значение угла, что всё выражение будет гораздо больше нуля.
|BB'|*sin(β)*tan(β)/(sqrt((|AB| + BB'_u)^2 + BB'_t^2) + (|AB| + BB'_u)) = 0.129856
f(x) := [x*cos(x); x*sin(x)]
f(1) = [0.540302; 0.841471]
k(π/2 - 0.000000000000001) = 8.5364e14
n(x) := f(x)*u
t(x) := sqrt((|AB| + f(x)*u)^2 + (f(x)*t)^2) - (|AB| + f(x)*u)
n(5) = 4.79462
t(5) = 0.0534395
# [plot: n(x), t(x) vs x]
vec(len, angle) := [len*cos(angle); len*sin(angle)]
f(5) = [1.41831; -4.79462]
t(0.01)/n(0.01) = -0.0357116
t(0.01) = 3.5711e-6
limit(t(x)/n(x), x → 0) → -1/28
n(0.01) = -9.99983e-5
f(0.01) = [0.0099995; 9.99983e-5]
h := vec(0.00000000005, 0.0001) = [5e-11; 5e-15]
dt(h) → 0.926442286059*10^-22
dn(h) = -5e-15
dt(h) < |dn(h)| → 1
dt(h)/dn(h) → -(0.185288457521*10^-7)
r(x) := dt(vec(x, 0.7))/dn(vec(x, 0.7))
r(0.00005) = -1.62156e-6
# [plot: dn(vec(x, 0.7)), dt(vec(x, 0.7)), dt(vec(x, 0.7))/dn(vec(x, 0.7)) vs x]
