c := 2
dh(x) := sqrt(c^2 + x^2) - c
limit(dh(x)/m(x), x → 0) → 0
m(x) := x
# [plot: dh(x), m(x) vs x]
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dh2(x) := sqrt(c^2 + (x + 0.5)^2) - c
# [plot: dh2(x), m(x), abs(dh2(x) - m(x)) vs x]
dh(0.7) float → 0.118962010042
limit(m(x)/dh2(x), x → 0) → 0.0
m(0) float → 0.0
dh2(0.4) = 0.193171
dh(0.7) + m(0.0) float → 0.118962010042
m(0.4) = 0.4
dh2(0.5) float → 0.2360679775
