A := 14
f(x, y) := (sqrt((A + y)^2 + x^2) - (A + y))/y
d/dx(sqrt((A + y)^2 + x^2) - (A + y)) → x/sqrt(y^2 + 28*y + x^2 + 196)
d/dy(sqrt((A + y)^2 + x^2) - (A + y)) → (y + 14)/sqrt(y^2 + 28*y + x^2 + 196) - 1
d/dx(y) → 0
d/dy(y) → 1
g(x) :=
    if x < 2
        x^2
    else
        5*x
# [plot: 1/x vs x]
f(4, 5) = 0.0832976
h(x) := sqrt((A + 0.00005*x)^2 + x^2) - (A + 0.00005*x)
h'(x) := d/dx(h(x)) → 1.0000000025*x/(1.0000000025*x^2 + 0.0014*x + 196.0)^0.5 + (0.0007/(1.0000000025*x^2 + 0.0014*x + 196.0)^0.5 - 1.0*0.00005)
g(x) := 0.00005*x
g'(x) := d/dx(g(x)) → 0.00005
# [plot: g(x), h(x) vs x]
h(3) = 0.317818
h(0.5) - h(0.05) = 0.00883642
g(3) = 0.00015
h(1) = 0.0356687
g(0.5) - g(0.05) = 2.25e-5
g(1) = 5e-5
limit(h(x)/g(x), x → 0) → 0.0
# [plot: h'(x), g'(x) vs x]
