h_0 := 75
v_0 := 0
a := 9.8
r := 1
F_t := 0.480*a → 4.704
τ := F_t*r → 4.704
h(t) := h_0 - v_0*t - a*t^2/2
h_0 - v_0*t - a*t^2/2 == 0 solve, t → [-3.91230398218; 3.91230398218]
# [plot: h(t) vs t]
α(t) := 2*(h_0 - v_0*t)/t^2  # Выразили ускорение при известном времени t и нулевой высоте
α(8.65) → 2.00474456213
